units                   electron
dimension               3
processors              * * *
boundary                p p p

#####################################################################

variable time equal 25*0.02418884326

#####################################################################

#read data
atom_style              molecular
read_data               Results/SiO2.data
timestep ${time}

#####################################################################

#potential
include                 Results/PARM_SiO2.lammps

#####################################################################


#####################################################################

#outputs
thermo                  100000
thermo_style            custom step pe ke epair ebond etotal vol temp

#####################################################################

dump                    1 all custom 100000 SiO2_dump.lammpstrj id element type x y z
dump_modify             1 element O Si
thermo_modify           line yaml

#####################################################################

#initial minimisation

min_style               sd
minimize        1.0e-6 1.0e-6 1000000 10000000

#####################################################################

#write_data              SiO2_results.dat
#write_restart  C_results.rest
